// COMSOL Multiphysics 6.1.0.357 model "Hg_glow_discharge_light.mph"
// DC Glow Discharge
// DC glow discharges in the low-pressure regime have long been used for gas lasers and fluorescent lamps. DC discharges are attractive to study because the solution is time independent. This 2D model shows how to use the DC Discharge interface to set up an analysis of a positive column. The discharge is sustained by emission of secondary electrons at the cathode.
// Outline of the model tree

Parameters
  V0 = 425 [V]  // Applied voltage

Variables
  var1 "Variables 1"
    Wf = 5  // Work function
    p0 = 0.5[torr]  // Gas pressure

Selections
  sel1: Explicit "Cathode" on boundaries 4-6, 10
  sel2: Explicit "Anode" on boundaries 7-9, 11
  sel3: Explicit "Walls" on boundaries 2, 3, 12
  sel4: Explicit "All Walls" on boundaries 2-12
  sel5: Explicit "Non Cathode Walls" on boundaries 2, 3, 7-9, 11, 12

Geometry
  geom1 "Geometry 1" (2D axisymmetric, length unit m)
    r1: Rectangle | size = {0.05*0.24, 0.4}
    r2: Rectangle | pos = {0.005, 0.01}; size = {0.0375*0.24*0.05, 6e-3}
    r3: Rectangle | pos = {0.005, 0.384}; size = {0.0375*0.24*0.05, 6e-3}
    co1: Compose | input = r1, r2, r3; formula = r1-r2-r3
    ls1: LineSegment | specify1 = coord; coord1 = {0, 0.02}; specify2 = coord; coord2 = {0.0375*0.24, 0.02}
    fin: Finalize "Form Union"
    mce1: MeshControlEdges | input = fin(1) boundaries 4

Physics
  plas: ColdPlasma "Plasma" on all domains
    dependent variable Ne
    TransportSettings.calcThermo = 1
    TransportSettings.fullDiffusivity = 0
    TransportSettings.Convection = 1
    ElectronProperties.ReducedProps = 1
    ElectronProperties.IncludeThermalDiffusion = 1
    EEDFSettings.eedf = Maxwellian
    xsec1: CrossSectionImport | Filepath = Ar_xsecs.txt
    eir1: ElectronImpactReaction "1: e+Hg=>e+Hg" on all domains
      formula = e+Hg=>e+Hg
      mratio = 0.136E-04/80
      xdata = {0.000000e+0, 3.000000e+1}
      ydata = {6.000000e-20, 6.000000e-20}
    eir2: ElectronImpactReaction "2: e+Hg=>e+Hg1" on all domains
      formula = e+Hg=>e+Hg1
      de = 4.66
      SpecifyReactionUsing = UseCrossSectionData
      xdata = {4.660000e+0, 4.830000e+0, 4.865000e+0, 4.945000e+0, 5.020000e+0, 5.061000e+0, 5.184000e+0, 5.311000e+0, 5.360000e+0, 5.509000e+0, 5.707000e+0, 5.886000e+0, 6.076000e+0, 6.195000e+0, 6.301000e+0, 6.446000e+0, 6.773000e+0, 7.164000e+0, 7.882000e+0, 8.402000e+0, 8.778000e+0, 9.367000e+0, 9.686000e+0, 9.838000e+0, 1.018000e+1, 1.061000e+1, 1.106000e+1, 1.197000e+1}
      ydata = {0.000000e+0, 2.965000e-21, 3.436000e-21, 3.996000e-21, 4.410000e-21, 4.759000e-21, 5.361000e-21, 6.018000e-21, 6.391000e-21, 6.880000e-21, 7.558000e-21, 8.524000e-21, 9.072000e-21, 9.525000e-21, 9.776000e-21, 1.000000e-20, 9.642000e-21, 8.823000e-21, 7.697000e-21, 6.838000e-21, 6.294000e-21, 5.374000e-21, 4.952000e-21, 4.599000e-21, 4.096000e-21, 3.598000e-21, 3.248000e-21, 2.892000e-21}
      RateConstantForm = UseTownsend
      xtownratedata = {0, 0.1, 0.105986981888, 0.112332403298, 0.119057723938, 0.126185688307, 0.133740402611, 0.141747416293, 0.150233808433, 0.159228279334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}
      ytownratedata = {0, 3.86284614599e-45, 4.68640623719e-45, 5.97901704183e-45, 8.03168932212e-45, 1.13609413461e-44, 1.69068199014e-44, 2.64253488583e-44, 4.328427214993E-44, 7.41132363786e-44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}
    eir3: ElectronImpactReaction "3: e+Hg1=>e+Hg" on all domains | formula = e+Hg1=>e+Hg; de = 4.66; xdata = 0; ydata = 0
    eir4: ElectronImpactReaction "4: e+Hg=>2e+Hg+" on all domains
      formula = e+Hg=>2e+Hg+
      de = 10.44
      SpecifyReactionUsing = UseCrossSectionData
      xdata = {1.044000e+1, 1.085000e+1, 1.095000e+1, 1.096000e+1, 1.097000e+1, 1.105000e+1, 1.106000e+1, 1.116000e+1, 1.122000e+1, 1.124000e+1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}
      ydata = {0.000000e+0, 2.221000e-22, 2.649000e-22, 3.194000e-22, 3.757000e-22, 4.266000e-22, 4.795000e-22, 5.513000e-22, 6.065000e-22, 6.771000e-22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}
      RateConstantForm = UseTownsend
      xtownratedata = {0, 0.1, 0.105986981888, 0.112332403298, 0.119057723938, 0.126185688307, 0.133740402611, 0.141747416293, 0.150233808433, 0.159228279334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}
      ytownratedata = {0, -4.04026211251e-52, -4.90164734714e-52, -6.25362624116e-52, -8.40057533776e-52, -1.18827359798e-51, -1.76833301946e-51, -2.76390339576e-51, -4.52722677076e-51, -7.75171698946e-51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}
    eir5: ElectronImpactReaction "5: e+Hg1=>2e+Hg+" on all domains
      formula = e+Hg1=>2e+Hg+
      de = 10.44-4.66
      xdata = {5.7775, 10.34, 12.84, 15.34, 20.34, 25.34, 30.34, 35.34, 40.34, 45.34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}
      ydata = {0.0, 1.13E-20, 2.47E-20, 2.68E-20, 3.79E-20, 4.5E-20, 5.09E-20, 5.44E-20, 5.75E-20, 5.95E-20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}
    rxn1: Reaction "6: Hg1+Hg1=>e+Hg+Hg+" on all domains | formula = Hg1+Hg1=>e+Hg+Hg+; kf = 3.734E8
    rxn2: Reaction "7: Hg1+Hg=>Hg+Hg" on all domains | formula = Hg1+Hg=>Hg+Hg; kf = 1807
    e: Species "Species: e" on all domains
      specName = e
      specLabel = e
      sType = electron
      sisDef = 1
      PresetSpeciesData = UserDefined
      M = 0.04[kg/mol]
      sigma = 3.3[angstrom]
      epsilonkb = 93.3[K]
      mu = 0.000[C*m]
      Dfs = 1E-4[m^2/s]
      x0 = 1E-8
      n0 = 1E13[1/m^3]
      Tlo = 300[K]
      Tmid = 1000[K]
      Thi = 5000[K]
      MobilityDiffusivitySpecification = ComputeMobilityAndDiffusivity
      IonTemperatureSpecification = UseGasForIonTemperature
      Tion = 300[K]
      MobilitySpecification = SpecifyConstantMobility
      um = 20[m^2/(V*s)]
      alphap = 1.64[angstrom^3]
      sighf = 7e-19[m^2]
      MobilityEFieldSpecification = EfieldVMobilityData
    Hg: Species "Species: Hg" on all domains | FromMassConstraint = 1; PresetSpeciesData = UserDefined; M = 0.2[kg/mol]
    Hg1: Species "Species: Hg1" on all domains | PresetSpeciesData = UserDefined; M = 0.2[kg/mol]
    Hg_1p: Species "Species: Hg+" on all domains | InitIon = 1; PresetSpeciesData = UserDefined; M = 0.2[kg/mol]
    sr1: SurfaceReaction "1: Hg+=>Hg" on selection sel1 | formula = Hg+=>Hg; gammai = 0.25; ebari = plas.de_4 - 2*Wf
    sr2: SurfaceReaction "2: Hg+=>Hg" on selection sel5 | formula = Hg+=>Hg; gammaf = 1; gammai = 0; ebari = 0
    pes1: PlasmaEsModel "Plasma Model 1" (default)
      pA = p0
      muN = mueN
      SpecifyElectronDensityAndEnergy = FromElectronImpact
    init1: InitialValues (default)
    zc1: ZeroCharge (default)
    ins1: Insulation (default)
    axi1: AxialSymmetry (default)
    wall1: WallDriftDiffusion "Wall 1" on boundaries 2, 3, 7-9, 11, 12 | re = 0; incmig = 0; th_ebar = 0.026
    gnd1: Ground on selection sel1
    mct1: MetalContact on selection sel2 | V0 = V0; CircuitType = BallastResistor; Rb = 3520[ohm]
    dct1: DielectricContact on selection sel3
      SurfaceChargeTypeSection = SurfaceChargeAccumulation
      EnableDistributedCapacitance = 0
    wall2: WallDriftDiffusion "Cathode" on selection sel1 | re = 0; incmig = 0; th_ebar = 0

Mesh
  mesh1 "Mesh 1"
    size: MeshSizeDefault | hmax = 0.0012; hauto = 1; custom = on
    size1: Size on boundaries 2-12 | table = plasma; hmax = 0.0024; hmin = 2.0E-4; hcurve = 0.2; hauto = 1
    ftri1: FreeTri "Free Triangular 1" on remaining entities
    bl1: BndLayer "Boundary Layers 1" on domains 1
      blp1: BndLayerProp "Boundary Layer Properties 1" on boundaries 2-12
        blnlayers = 5
        blstretch = 1.4
        blhmin = 0.000153486332408
        blhtot = 0.00168

Studies
  std1 "Study 1"
    param: Parametric "Parametric Sweep" | pname = V0; plistarr = range(750,-50,200); punit = V; reusesol = on
    time: Transient "Time Dependent" | tlist = 0 10^{range(-8,0.4,0)}

Solver configurations
  sol1 "Solution 1" (study std1)
    v1: Variables "Dependent Variables 1"
    t1: Time "Time-Dependent Solver 1"
      tlist = 0 10^{range(-8,0.4,0)}
      rtol = 0.001
      atolglobalmethod = unscaled
      atolglobalvaluemethod = manual
      initialstepbdf = (1.0E-13)[s]
      maxorder = 2
      estrat = exclude
      fc1: FullyCoupled | linsolver = d1; jtech = once
      d1: Direct | linsolver = pardiso
  sol43 "Parametric Solutions 7" (study std1)

Datasets
  cpt1: CutPoint2D "Cut Point center" | data = dset8; pointx = 0; pointy = 0.2
  cpt2: CutPoint2D "Cut Point border" | data = dset8; pointx = 0.012; pointy = 0.2
  dset8: Solution | solution = sol43

Plots
  pg1: PlotGroup2D "Electron Density (plas)" | data = dset8
    surf1: Surface | expr = plas.ne
  pg2: PlotGroup2D "Electron Temperature (plas)" | data = dset8
    surf1: Surface | expr = plas.Te
  pg9: PlotGroup2D "Metatables" | data = dset8
    surf1: Surface | expr = plas.n_wHg1
  pg14: PlotGroup2D "Electric field" | data = dset8
    surf1: Surface | expr = plas.normE
  pg12: PlotGroup1D "Ne V"
    ptgr1: PointGraph | data = cpt2; expr = plas.ne
  pg13: PlotGroup1D "mean energy V"
    ptgr1: PointGraph | data = cpt1; expr = plas.ebar

Exports
  plot1: Plot "Ne V" | filename = /home/comsol/trans/NeV_Hg_span.txt
  plot2: Plot "Mean energy V" | filename = /home/comsol/trans/TeV_Hg_span.txt